# 上游
# 入口損失水頭 | 管線損失水頭(非漸變段)
A := 4.3*4.3 = 18.49
L := 5.56
Q := 22.5
A := 4.3*3.54 = 15.222
P := 4.3*4 = 17.2
V := Q/A = 1.47812
R := A/P = 0.885
g := 9.81
Q := 22.5
f_2 := 0.5
V := Q/A = 1.47812
h_2 := f_2*V^2/(2*g) = 0.0556792
n := 0.014
H_2 := 1*h_2 = 0.0556792
g := 9.81
f_1 := 2*g/R^(1/3)*n^2 = 0.00400535
# 管線損失水頭(漸變段)
H_u1 := 4.3
W_u1 := 4.3
h_1 := f_1*L/R*V^2/(2*g) = 0.00280217
D_u1 := 2*H_u1*W_u1/(H_u1 + W_u1) = 4.3
H_1 := 1*h_1 = 0.00280217
H_u2 := 3.54
W_u2 := 4.3
D_u2 := 2*H_u2*W_u2/(H_u2 + W_u2) = 3.88316
L_u := 9.43
h_f := 2.37*n^2*Q^2*L_u/(D_u1 - D_u2)*(1/D_u2^(13/3) - 1/D_u1^(13/3)) = 0.00531657
H_a := H_1 + H_2 + h_f = 0.0637979
WL_a := 131.94
# 下游
# 管線損失水頭 | 出口損失水頭
L := 7.69
A := 4.3*2.92 = 12.556
A := 4.3*2.9 = 12.47
Q := 22.5
P := 4.3*2 + 2.9*2 = 14.4
V := Q/A = 1.80433
R := A/P = 0.865972
g := 9.81
Q := 22.5
f_3 := 1
V := Q/A = 1.80433
h_3 := f_3*V^2/(2*g) = 0.165933
n := 0.014
H_3 := 1*h_3 = 0.165933
g := 9.81
f_4 := 2*g/R^(1/3)*n^2 = 0.00403448
h_4 := f_4*L/R*V^2/(2*g) = 0.00594487
H_4 := 1*h_4 = 0.00594487
H_1 + H_2 + H_3 + H_4 = 0.230359
WL_b := 122.81
H_b := H_3 + H_4 = 0.171878
WL_a - H_a = 131.876
WL_b + H_b = 122.982
(WL_a - H_a) - (WL_b + H_b) = 8.89432
